Si(x) := integral(sin(y)/y, y = 0 .. x)
ε2min(R) := 1 - 2/π*Si(2*π*R)
R := 1, 2 .. 20
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F := 3600
Nф := 17
B := 4
Ts := 5/F
θ := B/(Nф - 1)
K0 := 1
fд := F/θ
α := B/(2*θ)
N := 2*α + 1
n := 0, 1 .. N
g(n) :=
    F*K0*sin(π*B)/(π*B) if n == 0 or n == N - 1
    (2*F*K0) if n == α
    (2*F*K0*sin(2*π*θ*(n - α))/(2*π*θ*(n - α))) otherwise
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Ns := Ts*fд + 1
S(n) :=
    0 if n < 0
    1/2 if n == 0
    1 if n > 0 and n < Ns - 1
    1/2 if n == Ns - 1
    0 if n > Ns - 1
n := -1, 0 .. Ns
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'
