x0 := -10
x1 := -3
x2 := 0
x3 := 12
x4 := 30
y0 := 9.5
y1 := 6
y2 := 10
y3 := -4
y4 := -4.8
Δ1_0 := (y1 - y0)/(x1 - x0)
Δ1_1 := (y2 - y1)/(x2 - x1)
Δ1_2 := (y3 - y2)/(x3 - x2)
Δ1_3 := (y4 - y3)/(x4 - x3)
x := [-10; -3; 0; 12; 30]
y := [9.5; 6; 10; -4; -4.8]
Δ2_0 := (Δ1_1 - Δ1_0)/(x2 - x0)
Δ2_1 := (Δ1_2 - Δ1_1)/(x3 - x1)
Δ2_2 := (Δ1_3 - Δ1_2)/(x4 - x2)
Δ3_0 := (Δ2_1 - Δ2_0)/(x3 - x0)
Δ3_1 := (Δ2_2 - Δ2_1)/(x4 - x1)
Δ4_0 := (Δ3_0 - Δ3_1)/(x4 - x0)
Nn_0(Z) := y0
Nn_1(Z) := (Z - x0)*Δ1_0
Nn_2(Z) := (Z - x0)*(Z - x1)*Δ2_0
Nn_3(Z) := (Z - x0)*(Z - x1)*(Z - x2)*Δ3_0
Nn_4(Z) := (Z - x0)*(Z - x1)*(Z - x2)*(Z - x3)*Δ4_0
Nn(Z) := Nn_0(Z) + Nn_1(Z) + Nn_2(Z) + Nn_3(Z) + Nn_4(Z)
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